<Lems>

    <!--

        This LEMS file has been automatically generated using PyNeuroML v0.3.6 (libNeuroML v0.2.36)

     -->

    <!-- Specify which component to run -->
    <Target component="Sim_HybridTut"/>

    <!-- Include core NeuroML2 ComponentType definitions -->
    <Include file="Cells.xml"/>
    <Include file="Networks.xml"/>
    <Include file="Simulation.xml"/>

    <Include file="HybridTut.net.nml"/>

    <Simulation id="Sim_HybridTut" length="1000.0ms" step="0.01ms" target="HybridTut" seed="12345">  <!-- Note seed: ensures same random numbers used every run -->

        <Display id="DispPop__PYR_HH" title="Membrane potentials of cells in PYR_HH" timeScale="1ms" xmin="-100.0" xmax="1100.0" ymin="-90" ymax="50">
            <Line id="PYR_HH[0]: v" quantity="PYR_HH/0/CELL_HH_PYR/v" scale="1mV" color="#6aaae7" timeScale="1ms"/>
            <Line id="PYR_HH[1]: v" quantity="PYR_HH/1/CELL_HH_PYR/v" scale="1mV" color="#2ec83e" timeScale="1ms"/>
            <Line id="PYR_HH[2]: v" quantity="PYR_HH/2/CELL_HH_PYR/v" scale="1mV" color="#72f5d5" timeScale="1ms"/>
            <Line id="PYR_HH[3]: v" quantity="PYR_HH/3/CELL_HH_PYR/v" scale="1mV" color="#795a93" timeScale="1ms"/>
            <Line id="PYR_HH[4]: v" quantity="PYR_HH/4/CELL_HH_PYR/v" scale="1mV" color="#ae0b17" timeScale="1ms"/>
            <Line id="PYR_HH[5]: v" quantity="PYR_HH/5/CELL_HH_PYR/v" scale="1mV" color="#4d1285" timeScale="1ms"/>
            <Line id="PYR_HH[6]: v" quantity="PYR_HH/6/CELL_HH_PYR/v" scale="1mV" color="#e64db0" timeScale="1ms"/>
            <Line id="PYR_HH[7]: v" quantity="PYR_HH/7/CELL_HH_PYR/v" scale="1mV" color="#fb92ee" timeScale="1ms"/>
            <Line id="PYR_HH[8]: v" quantity="PYR_HH/8/CELL_HH_PYR/v" scale="1mV" color="#5340bd" timeScale="1ms"/>
            <Line id="PYR_HH[9]: v" quantity="PYR_HH/9/CELL_HH_PYR/v" scale="1mV" color="#195a9e" timeScale="1ms"/>
            <Line id="PYR_HH[10]: v" quantity="PYR_HH/10/CELL_HH_PYR/v" scale="1mV" color="#5d5e5d" timeScale="1ms"/>
            <Line id="PYR_HH[11]: v" quantity="PYR_HH/11/CELL_HH_PYR/v" scale="1mV" color="#d59c87" timeScale="1ms"/>
            <Line id="PYR_HH[12]: v" quantity="PYR_HH/12/CELL_HH_PYR/v" scale="1mV" color="#9b1482" timeScale="1ms"/>
            <Line id="PYR_HH[13]: v" quantity="PYR_HH/13/CELL_HH_PYR/v" scale="1mV" color="#d28779" timeScale="1ms"/>
            <Line id="PYR_HH[14]: v" quantity="PYR_HH/14/CELL_HH_PYR/v" scale="1mV" color="#1fc492" timeScale="1ms"/>
            <Line id="PYR_HH[15]: v" quantity="PYR_HH/15/CELL_HH_PYR/v" scale="1mV" color="#aeea59" timeScale="1ms"/>
            <Line id="PYR_HH[16]: v" quantity="PYR_HH/16/CELL_HH_PYR/v" scale="1mV" color="#dfe7bc" timeScale="1ms"/>
            <Line id="PYR_HH[17]: v" quantity="PYR_HH/17/CELL_HH_PYR/v" scale="1mV" color="#e48216" timeScale="1ms"/>
            <Line id="PYR_HH[18]: v" quantity="PYR_HH/18/CELL_HH_PYR/v" scale="1mV" color="#e3e7b9" timeScale="1ms"/>
            <Line id="PYR_HH[19]: v" quantity="PYR_HH/19/CELL_HH_PYR/v" scale="1mV" color="#ed03dd" timeScale="1ms"/>
            <Line id="PYR_HH[20]: v" quantity="PYR_HH/20/CELL_HH_PYR/v" scale="1mV" color="#7d252c" timeScale="1ms"/>
            <Line id="PYR_HH[21]: v" quantity="PYR_HH/21/CELL_HH_PYR/v" scale="1mV" color="#a59cc0" timeScale="1ms"/>
            <Line id="PYR_HH[22]: v" quantity="PYR_HH/22/CELL_HH_PYR/v" scale="1mV" color="#3cf06c" timeScale="1ms"/>
            <Line id="PYR_HH[23]: v" quantity="PYR_HH/23/CELL_HH_PYR/v" scale="1mV" color="#664edf" timeScale="1ms"/>
            <Line id="PYR_HH[24]: v" quantity="PYR_HH/24/CELL_HH_PYR/v" scale="1mV" color="#4f43a9" timeScale="1ms"/>
            <Line id="PYR_HH[25]: v" quantity="PYR_HH/25/CELL_HH_PYR/v" scale="1mV" color="#b9a20a" timeScale="1ms"/>
            <Line id="PYR_HH[26]: v" quantity="PYR_HH/26/CELL_HH_PYR/v" scale="1mV" color="#6aa4d7" timeScale="1ms"/>
            <Line id="PYR_HH[27]: v" quantity="PYR_HH/27/CELL_HH_PYR/v" scale="1mV" color="#b0fa89" timeScale="1ms"/>
            <Line id="PYR_HH[28]: v" quantity="PYR_HH/28/CELL_HH_PYR/v" scale="1mV" color="#dab54d" timeScale="1ms"/>
            <Line id="PYR_HH[29]: v" quantity="PYR_HH/29/CELL_HH_PYR/v" scale="1mV" color="#7b7f09" timeScale="1ms"/>
            <Line id="PYR_HH[30]: v" quantity="PYR_HH/30/CELL_HH_PYR/v" scale="1mV" color="#1eb64d" timeScale="1ms"/>
            <Line id="PYR_HH[31]: v" quantity="PYR_HH/31/CELL_HH_PYR/v" scale="1mV" color="#72eb19" timeScale="1ms"/>
            <Line id="PYR_HH[32]: v" quantity="PYR_HH/32/CELL_HH_PYR/v" scale="1mV" color="#2cf125" timeScale="1ms"/>
            <Line id="PYR_HH[33]: v" quantity="PYR_HH/33/CELL_HH_PYR/v" scale="1mV" color="#f4624a" timeScale="1ms"/>
            <Line id="PYR_HH[34]: v" quantity="PYR_HH/34/CELL_HH_PYR/v" scale="1mV" color="#0409de" timeScale="1ms"/>
            <Line id="PYR_HH[35]: v" quantity="PYR_HH/35/CELL_HH_PYR/v" scale="1mV" color="#9413e0" timeScale="1ms"/>
            <Line id="PYR_HH[36]: v" quantity="PYR_HH/36/CELL_HH_PYR/v" scale="1mV" color="#c4bf88" timeScale="1ms"/>
            <Line id="PYR_HH[37]: v" quantity="PYR_HH/37/CELL_HH_PYR/v" scale="1mV" color="#4f2d61" timeScale="1ms"/>
            <Line id="PYR_HH[38]: v" quantity="PYR_HH/38/CELL_HH_PYR/v" scale="1mV" color="#57db60" timeScale="1ms"/>
            <Line id="PYR_HH[39]: v" quantity="PYR_HH/39/CELL_HH_PYR/v" scale="1mV" color="#181d97" timeScale="1ms"/>
            <Line id="PYR_HH[40]: v" quantity="PYR_HH/40/CELL_HH_PYR/v" scale="1mV" color="#14512d" timeScale="1ms"/>
            <Line id="PYR_HH[41]: v" quantity="PYR_HH/41/CELL_HH_PYR/v" scale="1mV" color="#0feade" timeScale="1ms"/>
            <Line id="PYR_HH[42]: v" quantity="PYR_HH/42/CELL_HH_PYR/v" scale="1mV" color="#46a5fe" timeScale="1ms"/>
            <Line id="PYR_HH[43]: v" quantity="PYR_HH/43/CELL_HH_PYR/v" scale="1mV" color="#652af9" timeScale="1ms"/>
            <Line id="PYR_HH[44]: v" quantity="PYR_HH/44/CELL_HH_PYR/v" scale="1mV" color="#087447" timeScale="1ms"/>
            <Line id="PYR_HH[45]: v" quantity="PYR_HH/45/CELL_HH_PYR/v" scale="1mV" color="#8dd556" timeScale="1ms"/>
            <Line id="PYR_HH[46]: v" quantity="PYR_HH/46/CELL_HH_PYR/v" scale="1mV" color="#474d5d" timeScale="1ms"/>
            <Line id="PYR_HH[47]: v" quantity="PYR_HH/47/CELL_HH_PYR/v" scale="1mV" color="#d4558a" timeScale="1ms"/>
            <Line id="PYR_HH[48]: v" quantity="PYR_HH/48/CELL_HH_PYR/v" scale="1mV" color="#804a91" timeScale="1ms"/>
            <Line id="PYR_HH[49]: v" quantity="PYR_HH/49/CELL_HH_PYR/v" scale="1mV" color="#15e1d3" timeScale="1ms"/>
        </Display>

        <Display id="DispPop__PYR_Izhi" title="Membrane potentials of cells in PYR_Izhi" timeScale="1ms" xmin="-100.0" xmax="1100.0" ymin="-90" ymax="50">
            <Line id="PYR_Izhi[0]: v" quantity="PYR_Izhi/0/CELL_Izhi_PYR/v" scale="1mV" color="#7376fc" timeScale="1ms"/>
            <Line id="PYR_Izhi[1]: v" quantity="PYR_Izhi/1/CELL_Izhi_PYR/v" scale="1mV" color="#1acc16" timeScale="1ms"/>
            <Line id="PYR_Izhi[2]: v" quantity="PYR_Izhi/2/CELL_Izhi_PYR/v" scale="1mV" color="#5e1d2c" timeScale="1ms"/>
            <Line id="PYR_Izhi[3]: v" quantity="PYR_Izhi/3/CELL_Izhi_PYR/v" scale="1mV" color="#03d617" timeScale="1ms"/>
            <Line id="PYR_Izhi[4]: v" quantity="PYR_Izhi/4/CELL_Izhi_PYR/v" scale="1mV" color="#91b078" timeScale="1ms"/>
            <Line id="PYR_Izhi[5]: v" quantity="PYR_Izhi/5/CELL_Izhi_PYR/v" scale="1mV" color="#245666" timeScale="1ms"/>
            <Line id="PYR_Izhi[6]: v" quantity="PYR_Izhi/6/CELL_Izhi_PYR/v" scale="1mV" color="#2bba43" timeScale="1ms"/>
            <Line id="PYR_Izhi[7]: v" quantity="PYR_Izhi/7/CELL_Izhi_PYR/v" scale="1mV" color="#b99fb2" timeScale="1ms"/>
            <Line id="PYR_Izhi[8]: v" quantity="PYR_Izhi/8/CELL_Izhi_PYR/v" scale="1mV" color="#40c33b" timeScale="1ms"/>
            <Line id="PYR_Izhi[9]: v" quantity="PYR_Izhi/9/CELL_Izhi_PYR/v" scale="1mV" color="#ec3aac" timeScale="1ms"/>
            <Line id="PYR_Izhi[10]: v" quantity="PYR_Izhi/10/CELL_Izhi_PYR/v" scale="1mV" color="#962c3c" timeScale="1ms"/>
            <Line id="PYR_Izhi[11]: v" quantity="PYR_Izhi/11/CELL_Izhi_PYR/v" scale="1mV" color="#b30384" timeScale="1ms"/>
            <Line id="PYR_Izhi[12]: v" quantity="PYR_Izhi/12/CELL_Izhi_PYR/v" scale="1mV" color="#4d9677" timeScale="1ms"/>
            <Line id="PYR_Izhi[13]: v" quantity="PYR_Izhi/13/CELL_Izhi_PYR/v" scale="1mV" color="#31609c" timeScale="1ms"/>
            <Line id="PYR_Izhi[14]: v" quantity="PYR_Izhi/14/CELL_Izhi_PYR/v" scale="1mV" color="#762381" timeScale="1ms"/>
            <Line id="PYR_Izhi[15]: v" quantity="PYR_Izhi/15/CELL_Izhi_PYR/v" scale="1mV" color="#2560cc" timeScale="1ms"/>
            <Line id="PYR_Izhi[16]: v" quantity="PYR_Izhi/16/CELL_Izhi_PYR/v" scale="1mV" color="#3518fa" timeScale="1ms"/>
            <Line id="PYR_Izhi[17]: v" quantity="PYR_Izhi/17/CELL_Izhi_PYR/v" scale="1mV" color="#c22a30" timeScale="1ms"/>
            <Line id="PYR_Izhi[18]: v" quantity="PYR_Izhi/18/CELL_Izhi_PYR/v" scale="1mV" color="#9d2f03" timeScale="1ms"/>
            <Line id="PYR_Izhi[19]: v" quantity="PYR_Izhi/19/CELL_Izhi_PYR/v" scale="1mV" color="#83fa6f" timeScale="1ms"/>
            <Line id="PYR_Izhi[20]: v" quantity="PYR_Izhi/20/CELL_Izhi_PYR/v" scale="1mV" color="#c63938" timeScale="1ms"/>
            <Line id="PYR_Izhi[21]: v" quantity="PYR_Izhi/21/CELL_Izhi_PYR/v" scale="1mV" color="#177c83" timeScale="1ms"/>
            <Line id="PYR_Izhi[22]: v" quantity="PYR_Izhi/22/CELL_Izhi_PYR/v" scale="1mV" color="#6002da" timeScale="1ms"/>
            <Line id="PYR_Izhi[23]: v" quantity="PYR_Izhi/23/CELL_Izhi_PYR/v" scale="1mV" color="#5772ab" timeScale="1ms"/>
            <Line id="PYR_Izhi[24]: v" quantity="PYR_Izhi/24/CELL_Izhi_PYR/v" scale="1mV" color="#bb744a" timeScale="1ms"/>
            <Line id="PYR_Izhi[25]: v" quantity="PYR_Izhi/25/CELL_Izhi_PYR/v" scale="1mV" color="#3bfc0d" timeScale="1ms"/>
            <Line id="PYR_Izhi[26]: v" quantity="PYR_Izhi/26/CELL_Izhi_PYR/v" scale="1mV" color="#65150b" timeScale="1ms"/>
            <Line id="PYR_Izhi[27]: v" quantity="PYR_Izhi/27/CELL_Izhi_PYR/v" scale="1mV" color="#58dcee" timeScale="1ms"/>
            <Line id="PYR_Izhi[28]: v" quantity="PYR_Izhi/28/CELL_Izhi_PYR/v" scale="1mV" color="#0b96d5" timeScale="1ms"/>
            <Line id="PYR_Izhi[29]: v" quantity="PYR_Izhi/29/CELL_Izhi_PYR/v" scale="1mV" color="#145050" timeScale="1ms"/>
            <Line id="PYR_Izhi[30]: v" quantity="PYR_Izhi/30/CELL_Izhi_PYR/v" scale="1mV" color="#4b2687" timeScale="1ms"/>
            <Line id="PYR_Izhi[31]: v" quantity="PYR_Izhi/31/CELL_Izhi_PYR/v" scale="1mV" color="#6a2a2e" timeScale="1ms"/>
            <Line id="PYR_Izhi[32]: v" quantity="PYR_Izhi/32/CELL_Izhi_PYR/v" scale="1mV" color="#2624f9" timeScale="1ms"/>
            <Line id="PYR_Izhi[33]: v" quantity="PYR_Izhi/33/CELL_Izhi_PYR/v" scale="1mV" color="#fa65fb" timeScale="1ms"/>
            <Line id="PYR_Izhi[34]: v" quantity="PYR_Izhi/34/CELL_Izhi_PYR/v" scale="1mV" color="#8218e1" timeScale="1ms"/>
            <Line id="PYR_Izhi[35]: v" quantity="PYR_Izhi/35/CELL_Izhi_PYR/v" scale="1mV" color="#e1d389" timeScale="1ms"/>
            <Line id="PYR_Izhi[36]: v" quantity="PYR_Izhi/36/CELL_Izhi_PYR/v" scale="1mV" color="#12e053" timeScale="1ms"/>
            <Line id="PYR_Izhi[37]: v" quantity="PYR_Izhi/37/CELL_Izhi_PYR/v" scale="1mV" color="#11f4e6" timeScale="1ms"/>
            <Line id="PYR_Izhi[38]: v" quantity="PYR_Izhi/38/CELL_Izhi_PYR/v" scale="1mV" color="#5632a9" timeScale="1ms"/>
            <Line id="PYR_Izhi[39]: v" quantity="PYR_Izhi/39/CELL_Izhi_PYR/v" scale="1mV" color="#414061" timeScale="1ms"/>
            <Line id="PYR_Izhi[40]: v" quantity="PYR_Izhi/40/CELL_Izhi_PYR/v" scale="1mV" color="#2b7d39" timeScale="1ms"/>
            <Line id="PYR_Izhi[41]: v" quantity="PYR_Izhi/41/CELL_Izhi_PYR/v" scale="1mV" color="#269100" timeScale="1ms"/>
            <Line id="PYR_Izhi[42]: v" quantity="PYR_Izhi/42/CELL_Izhi_PYR/v" scale="1mV" color="#57918d" timeScale="1ms"/>
            <Line id="PYR_Izhi[43]: v" quantity="PYR_Izhi/43/CELL_Izhi_PYR/v" scale="1mV" color="#b93f56" timeScale="1ms"/>
            <Line id="PYR_Izhi[44]: v" quantity="PYR_Izhi/44/CELL_Izhi_PYR/v" scale="1mV" color="#09d57e" timeScale="1ms"/>
            <Line id="PYR_Izhi[45]: v" quantity="PYR_Izhi/45/CELL_Izhi_PYR/v" scale="1mV" color="#61995d" timeScale="1ms"/>
            <Line id="PYR_Izhi[46]: v" quantity="PYR_Izhi/46/CELL_Izhi_PYR/v" scale="1mV" color="#517f6e" timeScale="1ms"/>
            <Line id="PYR_Izhi[47]: v" quantity="PYR_Izhi/47/CELL_Izhi_PYR/v" scale="1mV" color="#d4ffc9" timeScale="1ms"/>
            <Line id="PYR_Izhi[48]: v" quantity="PYR_Izhi/48/CELL_Izhi_PYR/v" scale="1mV" color="#bc6222" timeScale="1ms"/>
            <Line id="PYR_Izhi[49]: v" quantity="PYR_Izhi/49/CELL_Izhi_PYR/v" scale="1mV" color="#4beb9d" timeScale="1ms"/>
        </Display>

        <OutputFile id="Volts_file__PYR_HH" fileName="Sim_HybridTut.PYR_HH.v.dat">
            <OutputColumn id="v_PYR_HH_0_CELL_HH_PYR_v" quantity="PYR_HH/0/CELL_HH_PYR/v"/>
            <OutputColumn id="v_PYR_HH_1_CELL_HH_PYR_v" quantity="PYR_HH/1/CELL_HH_PYR/v"/>
            <OutputColumn id="v_PYR_HH_2_CELL_HH_PYR_v" quantity="PYR_HH/2/CELL_HH_PYR/v"/>
            <OutputColumn id="v_PYR_HH_3_CELL_HH_PYR_v" quantity="PYR_HH/3/CELL_HH_PYR/v"/>
            <OutputColumn id="v_PYR_HH_4_CELL_HH_PYR_v" quantity="PYR_HH/4/CELL_HH_PYR/v"/>
            <OutputColumn id="v_PYR_HH_5_CELL_HH_PYR_v" quantity="PYR_HH/5/CELL_HH_PYR/v"/>
            <OutputColumn id="v_PYR_HH_6_CELL_HH_PYR_v" quantity="PYR_HH/6/CELL_HH_PYR/v"/>
            <OutputColumn id="v_PYR_HH_7_CELL_HH_PYR_v" quantity="PYR_HH/7/CELL_HH_PYR/v"/>
            <OutputColumn id="v_PYR_HH_8_CELL_HH_PYR_v" quantity="PYR_HH/8/CELL_HH_PYR/v"/>
            <OutputColumn id="v_PYR_HH_9_CELL_HH_PYR_v" quantity="PYR_HH/9/CELL_HH_PYR/v"/>
            <OutputColumn id="v_PYR_HH_10_CELL_HH_PYR_v" quantity="PYR_HH/10/CELL_HH_PYR/v"/>
            <OutputColumn id="v_PYR_HH_11_CELL_HH_PYR_v" quantity="PYR_HH/11/CELL_HH_PYR/v"/>
            <OutputColumn id="v_PYR_HH_12_CELL_HH_PYR_v" quantity="PYR_HH/12/CELL_HH_PYR/v"/>
            <OutputColumn id="v_PYR_HH_13_CELL_HH_PYR_v" quantity="PYR_HH/13/CELL_HH_PYR/v"/>
            <OutputColumn id="v_PYR_HH_14_CELL_HH_PYR_v" quantity="PYR_HH/14/CELL_HH_PYR/v"/>
            <OutputColumn id="v_PYR_HH_15_CELL_HH_PYR_v" quantity="PYR_HH/15/CELL_HH_PYR/v"/>
            <OutputColumn id="v_PYR_HH_16_CELL_HH_PYR_v" quantity="PYR_HH/16/CELL_HH_PYR/v"/>
            <OutputColumn id="v_PYR_HH_17_CELL_HH_PYR_v" quantity="PYR_HH/17/CELL_HH_PYR/v"/>
            <OutputColumn id="v_PYR_HH_18_CELL_HH_PYR_v" quantity="PYR_HH/18/CELL_HH_PYR/v"/>
            <OutputColumn id="v_PYR_HH_19_CELL_HH_PYR_v" quantity="PYR_HH/19/CELL_HH_PYR/v"/>
            <OutputColumn id="v_PYR_HH_20_CELL_HH_PYR_v" quantity="PYR_HH/20/CELL_HH_PYR/v"/>
            <OutputColumn id="v_PYR_HH_21_CELL_HH_PYR_v" quantity="PYR_HH/21/CELL_HH_PYR/v"/>
            <OutputColumn id="v_PYR_HH_22_CELL_HH_PYR_v" quantity="PYR_HH/22/CELL_HH_PYR/v"/>
            <OutputColumn id="v_PYR_HH_23_CELL_HH_PYR_v" quantity="PYR_HH/23/CELL_HH_PYR/v"/>
            <OutputColumn id="v_PYR_HH_24_CELL_HH_PYR_v" quantity="PYR_HH/24/CELL_HH_PYR/v"/>
            <OutputColumn id="v_PYR_HH_25_CELL_HH_PYR_v" quantity="PYR_HH/25/CELL_HH_PYR/v"/>
            <OutputColumn id="v_PYR_HH_26_CELL_HH_PYR_v" quantity="PYR_HH/26/CELL_HH_PYR/v"/>
            <OutputColumn id="v_PYR_HH_27_CELL_HH_PYR_v" quantity="PYR_HH/27/CELL_HH_PYR/v"/>
            <OutputColumn id="v_PYR_HH_28_CELL_HH_PYR_v" quantity="PYR_HH/28/CELL_HH_PYR/v"/>
            <OutputColumn id="v_PYR_HH_29_CELL_HH_PYR_v" quantity="PYR_HH/29/CELL_HH_PYR/v"/>
            <OutputColumn id="v_PYR_HH_30_CELL_HH_PYR_v" quantity="PYR_HH/30/CELL_HH_PYR/v"/>
            <OutputColumn id="v_PYR_HH_31_CELL_HH_PYR_v" quantity="PYR_HH/31/CELL_HH_PYR/v"/>
            <OutputColumn id="v_PYR_HH_32_CELL_HH_PYR_v" quantity="PYR_HH/32/CELL_HH_PYR/v"/>
            <OutputColumn id="v_PYR_HH_33_CELL_HH_PYR_v" quantity="PYR_HH/33/CELL_HH_PYR/v"/>
            <OutputColumn id="v_PYR_HH_34_CELL_HH_PYR_v" quantity="PYR_HH/34/CELL_HH_PYR/v"/>
            <OutputColumn id="v_PYR_HH_35_CELL_HH_PYR_v" quantity="PYR_HH/35/CELL_HH_PYR/v"/>
            <OutputColumn id="v_PYR_HH_36_CELL_HH_PYR_v" quantity="PYR_HH/36/CELL_HH_PYR/v"/>
            <OutputColumn id="v_PYR_HH_37_CELL_HH_PYR_v" quantity="PYR_HH/37/CELL_HH_PYR/v"/>
            <OutputColumn id="v_PYR_HH_38_CELL_HH_PYR_v" quantity="PYR_HH/38/CELL_HH_PYR/v"/>
            <OutputColumn id="v_PYR_HH_39_CELL_HH_PYR_v" quantity="PYR_HH/39/CELL_HH_PYR/v"/>
            <OutputColumn id="v_PYR_HH_40_CELL_HH_PYR_v" quantity="PYR_HH/40/CELL_HH_PYR/v"/>
            <OutputColumn id="v_PYR_HH_41_CELL_HH_PYR_v" quantity="PYR_HH/41/CELL_HH_PYR/v"/>
            <OutputColumn id="v_PYR_HH_42_CELL_HH_PYR_v" quantity="PYR_HH/42/CELL_HH_PYR/v"/>
            <OutputColumn id="v_PYR_HH_43_CELL_HH_PYR_v" quantity="PYR_HH/43/CELL_HH_PYR/v"/>
            <OutputColumn id="v_PYR_HH_44_CELL_HH_PYR_v" quantity="PYR_HH/44/CELL_HH_PYR/v"/>
            <OutputColumn id="v_PYR_HH_45_CELL_HH_PYR_v" quantity="PYR_HH/45/CELL_HH_PYR/v"/>
            <OutputColumn id="v_PYR_HH_46_CELL_HH_PYR_v" quantity="PYR_HH/46/CELL_HH_PYR/v"/>
            <OutputColumn id="v_PYR_HH_47_CELL_HH_PYR_v" quantity="PYR_HH/47/CELL_HH_PYR/v"/>
            <OutputColumn id="v_PYR_HH_48_CELL_HH_PYR_v" quantity="PYR_HH/48/CELL_HH_PYR/v"/>
            <OutputColumn id="v_PYR_HH_49_CELL_HH_PYR_v" quantity="PYR_HH/49/CELL_HH_PYR/v"/>
        </OutputFile>

        <OutputFile id="Volts_file__PYR_Izhi" fileName="Sim_HybridTut.PYR_Izhi.v.dat">
            <OutputColumn id="v_PYR_Izhi_0_CELL_Izhi_PYR_v" quantity="PYR_Izhi/0/CELL_Izhi_PYR/v"/>
            <OutputColumn id="v_PYR_Izhi_1_CELL_Izhi_PYR_v" quantity="PYR_Izhi/1/CELL_Izhi_PYR/v"/>
            <OutputColumn id="v_PYR_Izhi_2_CELL_Izhi_PYR_v" quantity="PYR_Izhi/2/CELL_Izhi_PYR/v"/>
            <OutputColumn id="v_PYR_Izhi_3_CELL_Izhi_PYR_v" quantity="PYR_Izhi/3/CELL_Izhi_PYR/v"/>
            <OutputColumn id="v_PYR_Izhi_4_CELL_Izhi_PYR_v" quantity="PYR_Izhi/4/CELL_Izhi_PYR/v"/>
            <OutputColumn id="v_PYR_Izhi_5_CELL_Izhi_PYR_v" quantity="PYR_Izhi/5/CELL_Izhi_PYR/v"/>
            <OutputColumn id="v_PYR_Izhi_6_CELL_Izhi_PYR_v" quantity="PYR_Izhi/6/CELL_Izhi_PYR/v"/>
            <OutputColumn id="v_PYR_Izhi_7_CELL_Izhi_PYR_v" quantity="PYR_Izhi/7/CELL_Izhi_PYR/v"/>
            <OutputColumn id="v_PYR_Izhi_8_CELL_Izhi_PYR_v" quantity="PYR_Izhi/8/CELL_Izhi_PYR/v"/>
            <OutputColumn id="v_PYR_Izhi_9_CELL_Izhi_PYR_v" quantity="PYR_Izhi/9/CELL_Izhi_PYR/v"/>
            <OutputColumn id="v_PYR_Izhi_10_CELL_Izhi_PYR_v" quantity="PYR_Izhi/10/CELL_Izhi_PYR/v"/>
            <OutputColumn id="v_PYR_Izhi_11_CELL_Izhi_PYR_v" quantity="PYR_Izhi/11/CELL_Izhi_PYR/v"/>
            <OutputColumn id="v_PYR_Izhi_12_CELL_Izhi_PYR_v" quantity="PYR_Izhi/12/CELL_Izhi_PYR/v"/>
            <OutputColumn id="v_PYR_Izhi_13_CELL_Izhi_PYR_v" quantity="PYR_Izhi/13/CELL_Izhi_PYR/v"/>
            <OutputColumn id="v_PYR_Izhi_14_CELL_Izhi_PYR_v" quantity="PYR_Izhi/14/CELL_Izhi_PYR/v"/>
            <OutputColumn id="v_PYR_Izhi_15_CELL_Izhi_PYR_v" quantity="PYR_Izhi/15/CELL_Izhi_PYR/v"/>
            <OutputColumn id="v_PYR_Izhi_16_CELL_Izhi_PYR_v" quantity="PYR_Izhi/16/CELL_Izhi_PYR/v"/>
            <OutputColumn id="v_PYR_Izhi_17_CELL_Izhi_PYR_v" quantity="PYR_Izhi/17/CELL_Izhi_PYR/v"/>
            <OutputColumn id="v_PYR_Izhi_18_CELL_Izhi_PYR_v" quantity="PYR_Izhi/18/CELL_Izhi_PYR/v"/>
            <OutputColumn id="v_PYR_Izhi_19_CELL_Izhi_PYR_v" quantity="PYR_Izhi/19/CELL_Izhi_PYR/v"/>
            <OutputColumn id="v_PYR_Izhi_20_CELL_Izhi_PYR_v" quantity="PYR_Izhi/20/CELL_Izhi_PYR/v"/>
            <OutputColumn id="v_PYR_Izhi_21_CELL_Izhi_PYR_v" quantity="PYR_Izhi/21/CELL_Izhi_PYR/v"/>
            <OutputColumn id="v_PYR_Izhi_22_CELL_Izhi_PYR_v" quantity="PYR_Izhi/22/CELL_Izhi_PYR/v"/>
            <OutputColumn id="v_PYR_Izhi_23_CELL_Izhi_PYR_v" quantity="PYR_Izhi/23/CELL_Izhi_PYR/v"/>
            <OutputColumn id="v_PYR_Izhi_24_CELL_Izhi_PYR_v" quantity="PYR_Izhi/24/CELL_Izhi_PYR/v"/>
            <OutputColumn id="v_PYR_Izhi_25_CELL_Izhi_PYR_v" quantity="PYR_Izhi/25/CELL_Izhi_PYR/v"/>
            <OutputColumn id="v_PYR_Izhi_26_CELL_Izhi_PYR_v" quantity="PYR_Izhi/26/CELL_Izhi_PYR/v"/>
            <OutputColumn id="v_PYR_Izhi_27_CELL_Izhi_PYR_v" quantity="PYR_Izhi/27/CELL_Izhi_PYR/v"/>
            <OutputColumn id="v_PYR_Izhi_28_CELL_Izhi_PYR_v" quantity="PYR_Izhi/28/CELL_Izhi_PYR/v"/>
            <OutputColumn id="v_PYR_Izhi_29_CELL_Izhi_PYR_v" quantity="PYR_Izhi/29/CELL_Izhi_PYR/v"/>
            <OutputColumn id="v_PYR_Izhi_30_CELL_Izhi_PYR_v" quantity="PYR_Izhi/30/CELL_Izhi_PYR/v"/>
            <OutputColumn id="v_PYR_Izhi_31_CELL_Izhi_PYR_v" quantity="PYR_Izhi/31/CELL_Izhi_PYR/v"/>
            <OutputColumn id="v_PYR_Izhi_32_CELL_Izhi_PYR_v" quantity="PYR_Izhi/32/CELL_Izhi_PYR/v"/>
            <OutputColumn id="v_PYR_Izhi_33_CELL_Izhi_PYR_v" quantity="PYR_Izhi/33/CELL_Izhi_PYR/v"/>
            <OutputColumn id="v_PYR_Izhi_34_CELL_Izhi_PYR_v" quantity="PYR_Izhi/34/CELL_Izhi_PYR/v"/>
            <OutputColumn id="v_PYR_Izhi_35_CELL_Izhi_PYR_v" quantity="PYR_Izhi/35/CELL_Izhi_PYR/v"/>
            <OutputColumn id="v_PYR_Izhi_36_CELL_Izhi_PYR_v" quantity="PYR_Izhi/36/CELL_Izhi_PYR/v"/>
            <OutputColumn id="v_PYR_Izhi_37_CELL_Izhi_PYR_v" quantity="PYR_Izhi/37/CELL_Izhi_PYR/v"/>
            <OutputColumn id="v_PYR_Izhi_38_CELL_Izhi_PYR_v" quantity="PYR_Izhi/38/CELL_Izhi_PYR/v"/>
            <OutputColumn id="v_PYR_Izhi_39_CELL_Izhi_PYR_v" quantity="PYR_Izhi/39/CELL_Izhi_PYR/v"/>
            <OutputColumn id="v_PYR_Izhi_40_CELL_Izhi_PYR_v" quantity="PYR_Izhi/40/CELL_Izhi_PYR/v"/>
            <OutputColumn id="v_PYR_Izhi_41_CELL_Izhi_PYR_v" quantity="PYR_Izhi/41/CELL_Izhi_PYR/v"/>
            <OutputColumn id="v_PYR_Izhi_42_CELL_Izhi_PYR_v" quantity="PYR_Izhi/42/CELL_Izhi_PYR/v"/>
            <OutputColumn id="v_PYR_Izhi_43_CELL_Izhi_PYR_v" quantity="PYR_Izhi/43/CELL_Izhi_PYR/v"/>
            <OutputColumn id="v_PYR_Izhi_44_CELL_Izhi_PYR_v" quantity="PYR_Izhi/44/CELL_Izhi_PYR/v"/>
            <OutputColumn id="v_PYR_Izhi_45_CELL_Izhi_PYR_v" quantity="PYR_Izhi/45/CELL_Izhi_PYR/v"/>
            <OutputColumn id="v_PYR_Izhi_46_CELL_Izhi_PYR_v" quantity="PYR_Izhi/46/CELL_Izhi_PYR/v"/>
            <OutputColumn id="v_PYR_Izhi_47_CELL_Izhi_PYR_v" quantity="PYR_Izhi/47/CELL_Izhi_PYR/v"/>
            <OutputColumn id="v_PYR_Izhi_48_CELL_Izhi_PYR_v" quantity="PYR_Izhi/48/CELL_Izhi_PYR/v"/>
            <OutputColumn id="v_PYR_Izhi_49_CELL_Izhi_PYR_v" quantity="PYR_Izhi/49/CELL_Izhi_PYR/v"/>
        </OutputFile>

    </Simulation>

</Lems>
