<neuroml xmlns="http://www.neuroml.org/schema/neuroml2"  xmlns:xs="http://www.w3.org/2001/XMLSchema" xmlns:xsi="http://www.w3.org/2001/XMLSchema-instance" xsi:schemaLocation="http://www.neuroml.org/schema/neuroml2 https://raw.github.com/NeuroML/NeuroML2/development/Schemas/NeuroML2/NeuroML_v2beta4.xsd" id="M1">
    <notes>NeuroML 2 file exported from NetPyNE</notes>
    <include href="Izhi2007b.cell.nml"></include>
    <include href="Izhi2007b.cell.nml"></include>
    <include href="Izhi2007b.cell.nml"></include>
    <include href="Izhi2007b.cell.nml"></include>
    <include href="Izhi2007b.cell.nml"></include>
    <include href="Izhi2007b.cell.nml"></include>
    <include href="Izhi2007b.cell.nml"></include>
    <include href="Izhi2007b.cell.nml"></include>
    <include href="Izhi2007b.cell.nml"></include>
    <include href="Izhi2007b.cell.nml"></include>
    <include href="Izhi2007b.cell.nml"></include>
    <include href="Izhi2007b.cell.nml"></include>
    <include href="Izhi2007b.cell.nml"></include>
    <include href="Izhi2007b.cell.nml"></include>
    <include href="HH.cell.nml"></include>
    <network id="M1">
        <population id="IT_L23" component="Izhi2007b" type="populationList">
            <instance id="0">
                <location x="443.873641630992495" y="170.584895759335268" z="98.619485109110897"/>
            </instance>
            <instance id="1">
                <location x="159.554877885400117" y="278.810057370816764" z="119.232921251679727"/>
            </instance>
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        </population>
        <population id="IT_L4" component="Izhi2007b" type="populationList">
            <instance id="62">
                <location x="354.140924662183181" y="396.432779924792271" z="88.224170739336415"/>
            </instance>
            <instance id="63">
                <location x="895.111455981186964" y="430.253142928380214" z="659.022483821741162"/>
            </instance>
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        </population>
        <population id="IT_L5A" component="Izhi2007b" type="populationList">
            <instance id="85">
                <location x="690.409143667595004" y="492.017675684127539" z="101.457912217629115"/>
            </instance>
            <instance id="86">
                <location x="899.161198946216246" y="634.063200299196978" z="430.860531693537212"/>
            </instance>
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        </population>
        <population id="IT_L5B" component="Izhi2007b" type="populationList">
            <instance id="248">
                <location x="49.67413713156332" y="812.163899623961242" z="789.558603365344197"/>
            </instance>
            <instance id="249">
                <location x="234.976248993392744" y="981.265714641901241" z="65.056838469671476"/>
            </instance>
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        </population>
        <population id="PT_L5B" component="Izhi2007b" type="populationList">
            <instance id="392">
                <location x="49.67413713156332" y="812.163899623961242" z="789.558603365344197"/>
            </instance>
            <instance id="393">
                <location x="234.976248993392744" y="981.265714641901241" z="65.056838469671476"/>
            </instance>
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        </population>
        <population id="IT_L6" component="Izhi2007b" type="populationList">
            <instance id="536">
                <location x="164.697810454616075" y="1184.590787654044561" z="997.685849821191482"/>
            </instance>
            <instance id="537">
                <location x="202.869047255407878" y="1340.164457470549223" z="477.825424631988653"/>
            </instance>
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        </population>
        <population id="CT_L6" component="Izhi2007b" type="populationList">
            <instance id="708">
                <location x="164.697810454616075" y="1184.590787654044561" z="997.685849821191482"/>
            </instance>
            <instance id="709">
                <location x="202.869047255407878" y="1340.164457470549223" z="477.825424631988653"/>
            </instance>
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        </population>
        <population id="PV_L23" component="Izhi2007b" type="populationList">
            <instance id="880">
                <location x="980.154718644546733" y="177.017675684127539" z="201.754295754024469"/>
            </instance>
            <instance id="881">
                <location x="11.628974131038694" y="319.063200299196978" z="863.929153759511109"/>
            </instance>
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        </population>
        <population id="SOM_L23" component="Izhi2007b" type="populationList">
            <instance id="928">
                <location x="952.62612704657829" y="177.017675684127539" z="143.951354367027648"/>
            </instance>
            <instance id="929">
                <location x="144.392662848875204" y="319.063200299196978" z="272.656580696750382"/>
            </instance>
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        </population>
        <population id="PV_L5" component="Izhi2007b" type="populationList">
            <instance id="947">
                <location x="407.964638647732784" y="527.645950225883439" z="370.085172175290893"/>
            </instance>
            <instance id="948">
                <location x="836.156474253268129" y="753.685735309634879" z="565.127737343763329"/>
            </instance>
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        </population>
        <population id="SOM_L5" component="Izhi2007b" type="populationList">
            <instance id="1085">
                <location x="407.964638647732784" y="527.645950225883439" z="370.085172175290893"/>
            </instance>
            <instance id="1086">
                <location x="836.156474253268129" y="753.685735309634879" z="565.127737343763329"/>
            </instance>
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        </population>
        <population id="PV_L6" component="Izhi2007b" type="populationList">
            <instance id="1223">
                <location x="814.206485158868645" y="1379.769336002441833" z="80.917732924635217"/>
            </instance>
            <instance id="1224">
                <location x="836.082017552144862" y="1250.366959324376467" z="908.957861551459928"/>
            </instance>
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        </population>
        <population id="SOM_L6" component="Izhi2007b" type="populationList">
            <instance id="1292">
                <location x="814.206485158868645" y="1379.769336002441833" z="80.917732924635217"/>
            </instance>
            <instance id="1293">
                <location x="836.082017552144862" y="1250.366959324376467" z="908.957861551459928"/>
            </instance>
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        </population>
        <population id="IT_cells" component="Izhi2007b" type="populationList">
            <instance id="1361">
                <location x="1." y="600." z="2."/>
            </instance>
            <instance id="1362">
                <location x="2." y="750." z="3."/>
            </instance>
        </population>
        <population id="PT_cells" component="HH" type="populationList">
            <instance id="1363">
                <location x="1." y="600." z="2."/>
            </instance>
            <instance id="1364">
                <location x="2." y="750." z="3."/>
            </instance>
        </population>
    </network>
</neuroml>
